# bulk water

units           metal
boundary        p p p
atom_style      atomic

neighbor        2.0 bin
neigh_modify    every 50 delay 0 check no

read_data	    ../lmp/water.lmp
mass 		    1 16
mass		    2 2

replicate       1 1 1

# load the plugin at <install_prefix>/lib/libdeepmd_lmp.so
plugin load     ../../../dp/lib/libdeepmd_lmp.so


pair_style	    deepmd ../../../model/water/graph-original.pb
pair_coeff      * *

velocity        all create 330.0 23456789

fix             1 all nvt temp 330.0 330.0 0.5
timestep        0.0005
thermo_style    custom step pe ke etotal temp press vol
thermo          100
# dump		    1 all custom 100 water.dump id type x y z

run             99
